<?xml version="1.0" encoding="utf-8"?>
<turbine_engine name="CFM_Leap_1A32">
    <milthrust unit="LBS">32900.0</milthrust>
    <!-- TODO FIXME: derive bypassratio from t_spool! -->
    <bypassratio>11.0</bypassratio>
    <tsfc>0.576</tsfc>
    <idlen1>16.0</idlen1>
    <idlen2>47.0</idlen2>
    <maxn1>104.0</maxn1>
    <maxn2>103.0</maxn2>
    <!-- TODO: augmentation and injection not supported yet -->
    <augmented>0</augmented>
    <injected>0</injected>
    <function name="IdleThrust">
	<table>
	    <independentVar lookup="row">velocities/mach</independentVar>
	    <independentVar lookup="column">atmosphere/density-altitude</independentVar>
	    <tableData>
                               -5000           0        5000       10000       15000       20000       25000       30000       35000       40000       45000       50000
                       0     0.11424         0.1    0.086536    0.074032    0.062914    0.053554    0.044958    0.037429     0.03128    0.024694    0.019323    0.015385
                     0.1    0.086123    0.075804    0.065971    0.056764     0.04852    0.041546    0.035086    0.029388    0.024722    0.019536    0.015287    0.012171
                     0.2    0.058411    0.051983    0.045748    0.039801    0.034398    0.029779    0.025426     0.02153    0.018323    0.014506    0.011351   0.0090375
                     0.3    0.029889     0.02749    0.024975    0.022398    0.019926    0.017736    0.015551     0.01351    0.011803   0.0093811   0.0073408   0.0058446
                     0.4 -0.00073865    0.001212   0.0027079     0.00376   0.0044435   0.0048655   0.0050111     0.00496   0.0048618   0.0039268   0.0030728   0.0024465
                     0.5   -0.034907   -0.028085   -0.022099   -0.016988   -0.012779  -0.0094386  -0.0066927  -0.0045246  -0.0028293  -0.0021156  -0.0016555  -0.0013181
                     0.6   -0.074265   -0.061817   -0.050648   -0.040854   -0.032577   -0.025873   -0.020131   -0.015408   -0.011648  -0.0090427   -0.007076  -0.0056338
                     0.7    -0.12076    -0.10166   -0.084356   -0.069023   -0.055939   -0.045259   -0.035977   -0.028235   -0.022037   -0.017203   -0.013462   -0.010718
                     0.8    -0.17673    -0.14961    -0.12492    -0.10292   -0.084048    -0.06858   -0.055037   -0.043663   -0.034529   -0.027015    -0.02114   -0.016831
                     0.9    -0.24501     -0.2081    -0.17441    -0.14428    -0.11834   -0.097032   -0.078291   -0.062485   -0.049771   -0.038987   -0.030508    -0.02429
                       1    -0.32906    -0.28012    -0.23535     -0.1952    -0.16057    -0.13208    -0.10694   -0.085673   -0.068551   -0.053739   -0.042051    -0.03348
                     1.1    -0.43313     -0.3693    -0.31082    -0.25828     -0.2129     -0.1755    -0.14244    -0.11442   -0.091838   -0.072031   -0.056365   -0.044876
                     1.2    -0.56242    -0.48012    -0.40461    -0.33669    -0.27795     -0.2295     -0.1866    -0.15018    -0.12082   -0.094796   -0.074179    -0.05906
                     1.3    -0.72331    -0.61804    -0.52136    -0.43431    -0.35896    -0.29676    -0.24161    -0.19475    -0.15695    -0.12318   -0.096388   -0.076742
                     1.4    -0.92356    -0.78973    -0.66674    -0.55589    -0.45987    -0.38057    -0.31018    -0.25032      -0.202    -0.15857    -0.12409   -0.098794
	    </tableData>
	</table>
    </function>
    <function name="MilThrust">
	<table>
	    <independentVar lookup="row">velocities/mach</independentVar>
	    <independentVar lookup="column">atmosphere/density-altitude</independentVar>
	    <tableData>
                               -5000           0        5000       10000       15000       20000       25000       30000       35000       40000       45000       50000
                       0      1.1424           1     0.86536     0.74032     0.62914     0.53554     0.44958     0.37429      0.3128     0.24694     0.19323     0.15385
                     0.1      1.0544     0.92435     0.80114     0.68646     0.58431     0.49819     0.41893     0.34936     0.29251     0.23098     0.18075     0.14391
                     0.2     0.97926     0.86002     0.74677     0.64108     0.54672     0.46705     0.39351     0.32881      0.2759     0.21794     0.17054     0.13578
                     0.3     0.91325     0.80382     0.69956     0.60192     0.51451     0.44055     0.37206     0.31163     0.26215     0.20716     0.16211     0.12906
                     0.4     0.85279     0.75269      0.6569     0.56682     0.48587     0.41721     0.35336     0.29682     0.25046     0.19802     0.15495     0.12337
                     0.5     0.79419     0.70345     0.61614     0.53355     0.45899     0.39554     0.33619      0.2834     0.24004     0.18989     0.14859     0.11831
                     0.6     0.73338     0.65268     0.57439     0.49973     0.43189      0.3739     0.31924     0.27033     0.23006     0.18213     0.14252     0.11347
                     0.7     0.66577     0.59644     0.52835     0.46262     0.40233     0.35045     0.30102     0.25641     0.21956     0.17398     0.13614     0.10839
                     0.8     0.58586     0.53007      0.4741       0.419     0.36766     0.32302     0.27978     0.24024     0.20743     0.16458     0.12878     0.10253
                     0.9     0.48697      0.4479     0.40691     0.36492     0.32465     0.28897     0.25338     0.22012     0.19231     0.15285      0.1196    0.095226
                       1     0.36087     0.34292      0.3209     0.29553     0.26932     0.24501     0.21917     0.19393     0.17251     0.13747     0.10757    0.085649
                     1.1     0.19726      0.2064     0.20872     0.20476     0.19666     0.18706     0.17386     0.15904     0.14592     0.11681    0.091404    0.072774
                     1.2   -0.016698    0.027399    0.061216    0.085001     0.10045     0.10999     0.11328     0.11213     0.10991    0.088772    0.069465    0.055306
                     1.3    -0.29704    -0.20773    -0.13309   -0.073252   -0.027139   0.0073645    0.032246    0.049017    0.061123    0.050749    0.039712    0.031618
                     1.4    -0.66379    -0.51601    -0.38851    -0.28188    -0.19589    -0.12886   -0.075775   -0.035516  -0.0046176 -0.00054018 -0.00042269 -0.00033654
	    </tableData>
	</table>
    </function>
</turbine_engine>
